# Unmanned Surface Vehicle (USV)
#
# Schiffsdynamik
# Aufgabenstellung
# Das dynamische Modell des Katamarans beschreibt die Schiffsdynamik unter der Voraus-setzung zweier symmetrischer Antriebe. Das Modell wird stufenweise aufgebaut.
#
# Modell 1:  ohne Reibkräfte
# ohne Driftkräfte durch Wellen, Wind und Strömungen
# ohne Corioliskräfte
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# Modell 1
# Schubkraft Motor A | F_A
# Schubkraft Motor B | F_B
# Abstand der Motoren zur Mittelachse | a
# Schiffsmasse | m_S
# Massenträgheitsmoment des Gesamtschiffes | J_S
# Startwinkel | φ_0
# Kurswinkel
φ(t)
# Startkoordinaten | X_0 | Y_0
# Schiffsbewegung im Inertialsystem
X(t)
Y(t)
# Bewegungsgleichungen (reibungsfrei)
# Drehimpulssatz um z
J_S*(d^2/dt^2(φ)) == -F_A*a + F_B*a
# Drehwinkel
φ(t) == integral(integral((F_B - F_a)*a/J_S, t = 0 .. t), t = 0 .. t)
φ(t) == a*t^2*(F_A - F_B)/(2*J_S) + φ_0
# Impulssatz in x-Richtung
m_S*(d^2/dt^2(x)) == F_A + F_B
# Impulssatz in y-Richtung
m_S*(d^2/dt^2(y)) == 0
# Beschleunigung in x-Richtung
x'' == (F_A + F_B)/m_S
# Geschwindigkeit in x-Richtung
x' == (F_A + F_B)/m*t + C_1
C_1 == v_x0
# Weg in x-Richtung
x == (F_A + F_B)/m*t^2/2 + C_1*t + C_2
C_2 == x_0
# Beschleunigung in y-Richtung
y'' == 0
# Bewegungsgleichungen (reibungsfrei)
# Geschwindigkeit in y-Richtung
y' == C_3
C_3 == v_y0 == 0
# Weg in y-Richtung
y == C_3*t + C_4
C_4 == y_0
# Beispielrechnung
# gegebene Größen
# Schubkraft Motor A
F_A := 1 N
# Schubkraft Motor B
F_B := 2 N
# Abstand der Motoren zur Mittelachse
a := 0.1 m
# Schiffsmasse
m_S := 100 kg
# Massenträgheitsmoment Gesamtschiff
J_S := 10*kg*m^2
# Startwinkel
φ_0 := 0 deg
# Startkoordinate in X-Richtung (Inertialsystem)
X_0 := 1*m
# Anfangsgeschwindigkeit in x-Richtung
v_x0 := 0
# Startkoordinate in Y-Richtung (Inertialsystem)
Y_0 := 1*m
# Anfangsgeschwindigkeit in y-Richtung
v_y0 := 0
# Grenzen
t_max := 35*s
Step := 0.1*s
# Simulationszeit
t := 0*s, Step .. t_max
# Kurswinkel
φ(t) := integral(integral((F_B - F_A)*a/J_S, t = 0 .. t), t = 0 .. t) + φ_0
# Geschwindigkeit in x
v_x(t) := (F_A + F_B)/m_S*t + v_x0
# [chart]
    Y := φ(t)*1/deg
    X := t
# Weg in x-Richtung
# (körperfestes Koordinatensystem)
x(t) := (F_A + F_B)/m_S*t^2/2
# Impuls in y-Richtung ist null
y(t) := 0*m
# Bahngeschwindigkeit in X
V_X(t) == x'(t)*cos(φ(t)) - y'(t)*sin(φ(t))
# Bahngeschwindigkeit in Y
V_Y(t) == y'(t)*cos(φ(t)) + x'(t)*sin(φ(t))
V_X(t) := v_x(t)*cos(φ(t))
V_Y(t) := v_x(t)*sin(φ(t))
# [chart]
    Y := V_Y(t)
    X := V_X(t)
# Koordinatentransformation in Bahnkoordinaten
# Bahn in X
X(t) := integral(V_X(t), t = 0 .. t) + X_0
# Bahn in Y
Y(t) := integral(V_Y(t), t = 0 .. t) + Y_0
# [chart]
    Y := Y(t)
    X := X(t)
# Modell 2
# Reibkräfte in Fahrtrichtung (x-Richtung)
# Reibkräfte quer zur Fahrtrichtung (y-Richtung)
# Reibkräfte in Rotationsrichtung
# Driftkräfte durch Wind
# Geschwindigkeiten durch Strömungen
# Schubkraft Motor A | F_A
# Schubkraft Motor B | F_B
# Abstand der Motoren zur Mittelachse | a
# Schiffsmasse | m_S
# Massenträgheitsmoment des Gesamtschiffes | J_S
# Driftkräfte (Wind) | F_D
# Driftwinkel (Wind) | β
# Strömungsgeschwindigkeit | v_St
# Strömungswinkel | γ
# STOKES'sche Reibung in Fahrtrichtung | k_x
# STOKES'sche Reibung quer zur Fahrtrichtung | k_y
# Torsionsreibung um die z-Achse | k_t
# Startwinkel | φ_0
# Kurswinkel
φ(t)
# Startkoordinaten | X_0 | Y_0
# Schiffsbewegung im Inertialsystem
X(t)
Y(t)
# Bewegungsgleichungen Stufe 2
# Drehung
# Drehimpulssatz um z
J_S*(d^2/dt^2(φ)) == -F_A*a + F_B*a - k_t*(d/dt(φ))
# Winkelbeschleunigung
φ'' == a/J_S*(F_B - F_A) - k_t/J_S*φ'
# x-Achse
# Strömungsgeschwindigkeit in x-Richtung
v_Stx == v_St*cos(γ - φ)
# Reibkraft für Translation in x
F_Rx == k_x*(v_x - v_Stx)
# Driftkraft in x-Richtung (Winddrift)
F_Dx == F_D*cos(β - φ)
# Impulssatz in x-Richtung
m_S*(d^2/dt^2(x)) == F_A + F_B - F_Rx + F_Dx
# Beschleunigung in x-Richtung
x'' == 1/m_S*(F_A + F_B - F_Rx + F_Dx)
# y-Achse
# Strömungsgeschwindigkeit in y-Richtung
v_Sty == v_St*sin(γ - φ)
# Reibkraft für Translation in y
F_Ry == k_y*(v_y - v_Stx)
# Driftkraft in y-Richtung (Winddrift)
F_Dy == F_D*sin(β - φ)
# Impulssatz in y-Richtung
m_S*(d^2/dt^2(y)) == F_Dy - F_Ry
# Beschleunigung in y-Richtung
y'' == 1/m_S*(F_Dy - F_Ry)
# Koordinatentransformation in Bahnkoordinaten
# Bahngeschwindigkeit in X
v_X(t) == x'(t)*cos(φ(t)) - y'(t)*sin(φ(t))
# Bahngeschwindigkeit in Y
v_Y(t) == y'(t)*cos(φ(t)) + x'(t)*sin(φ(t))
# Beispielrechnung
# gegebene Größen
# Schubkraft Motor A
F_A := 1 N
# Schubkraft Motor B
F_B := 2 N
# Abstand der Motoren zur Mittelachse
a := 0.1 m
# Schiffsmasse
m_S := 100*kg
# Massenträgheitsmoment des Gesamtschiffes
J_S := 10 kg*m^2
# Driftkräfte (Wind)
F_D := 0 N
# Driftwinkel (Wind)
β := 0 deg
# Strömungsgeschwindigkeit
v_St := 0*m/s
# Strömungswinkel
γ := 0 deg
# STOKES'sche Reibung in Fahrtrichtung
k_x := 40*kg/s
# STOKES'sche Reibung quer zur Fahrtrichtung
k_y := 80*kg/s
# Torsionsreibung um die z-Achse
k_t := 5 N*m*s
# Anfangsbedingungen
φ_0 := 0*rad
ω_0 := 0*rad/s
X_0 := 1 m
v_x0 := 0 m/s
Y_0 := 1 m
v_y0 := 0 m/s
# Dgl.-System
# Simulationszeit
t_S := 300 s
solve block
    # constraints
    φ''(t) == -k_t/J_S*φ'(t) + a/J_S*(F_B - F_A)
    v_x'(t) == 1/m_S*(F_A + F_B - k_x*(v_x(t) - v_St*cos(γ - φ(t))) + F_D*cos(β - φ(t)))
    v_y'(t) == 1/m_S*(F_D*sin(β - φ(t)) - k_y*(v_y(t) - v_St*sin(γ - φ(t))))
    v_x(0) == v_x0
    v_y(0) == v_y0
    φ(0) == φ_0
    φ'(0) == ω_0
    # solver
    [φ; v_x; v_y] := odesolve([φ(t); v_x(t); v_y(t)], t_S)
end solve block
# Visualisierung der Lösung
# Berechnungsintervall
t := 0*s, 0.1*s .. 300*s
# Koordinatentransformation in Bahnkoordinaten
# Bahngeschwindigkeit in X
V_X(t) := v_x(t)*cos(φ(t)) - v_y(t)*sin(φ(t))
# Bahngeschwindigkeit in Y
V_Y(t) := v_y(t)*cos(φ(t)) + v_x(t)*sin(φ(t))
# Bahngeschwindigkeit
V(t) := sqrt(V_X(t)^2 + V_Y(t)^2)
# Bahnkurve X(t)
X(t) := integral(V_X(t), t = 0 .. t) + X_0
# Bahnkurve Y(t)
Y(t) := integral(V_Y(t), t = 0 .. t) + Y_0
# [chart]
    Y := Y(t)
    X := X(t)
# [plot: φ(t) (deg) vs t]
# Kurswinkel
# [plot: V(t) (m/s) vs t]
# Schiffsgeschwindigkeit
